// COMSOL Multiphysics 6.1.0.282 model "box_vacuum_test.mph"
// Outline of the model tree

Common definitions
  minpt1: CommonInputDef "Model Input 1" on boundaries 1-5, 12 | value = 400[K]
  minpt2: CommonInputDef "Model Input 2" on boundaries 6-11

Geometry
  geom1 "Geometry 1" (3D, length unit m)
    blk1: Block | size = {15, 10, 10}
    blk2: Block | pos = {6, 3.5, 0}; size = {3, 2, 2}
    fin: Finalize "Form Union"

Materials
  mat1: Common "Aluminum" on boundaries 1-5, 12
    def "Basic"
      relpermeability = 1
      heatcapacity = 900[J/(kg*K)]
      thermalconductivity = 238[W/(m*K)]
      electricconductivity = 3.774e7[S/m]
      relpermittivity = 1
      thermalexpansioncoefficient = 23e-6[1/K]
      density = 2700[kg/m^3]
      emissivity = 0.09
    Enu "Young's modulus and Poisson's ratio"
      E = 70[GPa]
      nu = 0.33
    Murnaghan
      l = -250[GPa]
      m = -330[GPa]
      n = -350[GPa]
  mat2: Common "Polypropylene [solid]" on boundaries 6-11
    def "Basic"
      thermalconductivity = k(T)
      heatcapacity = C(T)
      density = 9.00000000e+02
      TD = TD(T)
      emissivity = 0.97
      k: Piecewise | arg = T; pieces = {293.0, 573.16, -1.844683+0.01728236*T^1-5.595958E-5*T^2+8.080328E-8*T^3-4.317061E-11*T^4}; argunit = K; fununit = W/(m*K)
      C: Piecewise | arg = T; pieces = {293.0, 573.16, 18307.0711-217.341855*T^1+1.01268741*T^2-0.00213464542*T^3+2.07517488E-6*T^4-7.3616434E-10*T^5}; argunit = K; fununit = J/(kg*K)
      TD: Piecewise
        arg = T
        pieces = 
          {293.0, 353.0, 4.646933E-6-5.243467E-8*T^1+2.256484E-10*T^2-4.294038E-13*T^3+3.042465E-16*T^4}
          {353.0, 573.16, 1.528213E-6-1.161608E-8*T^1+3.481049E-11*T^2-4.613923E-14*T^3+2.288758E-17*T^4}
        argunit = K
        fununit = m^2/s

Physics
  rad: SurfaceToSurfaceRadiation on boundaries 1-5, 12
    dependent variable surfaceradiosity
    RadiationSettings.radiationMethod = area
    RadiationSettings.wavelengthDependenceOfSurfaceProperties = SolarAndAmbient
    dsurf1: DiffuseSurface (default)
      minput_temperature_src = fromCommonDef
      defineAmbientTemperatureOnEachSide = 1
      defineAmbientEmissivityOnEachSide = 0
      Tambu = 400[K]
      Tambd = 300[K]
    init1: init "Initial Values 1" (default) | Tinit = 400[K]
    opac1: Opacity on domains 1
  rad2: SurfaceToSurfaceRadiation on boundaries 6-11
    dependent variable surfaceradiosity
    ShapeProperty.order_surfaceradiosity_disc = 4
    RadiationSettings.radiationResolution = 64
    RadiationSettings.wavelengthDependenceOfSurfaceProperties = Constant
    dsurf1: DiffuseSurface (default) | minput_temperature_src = fromCommonDef; defineAmbientTemperatureOnEachSide = 1
    init1: init "Initial Values 1" (default)
    opac1: Opacity on domains 2 | opaque = 1

Mesh
  mesh1 "Mesh 1" (physics-controlled)

Studies
  std1 "Study 1"
    time: Transient "Time Dependent" | tunit = h; tlist = range(0,1,10)

Solver configurations
  sol1 "Solution 1" (study std1)
    v1: Variables "Dependent Variables 1"
      comp1_rad2_dsurf1_Jd_band: Field "Surface radiosity, downside (comp1.rad2.dsurf1.Jd_band)" | scalemethod = init
      comp1_rad2_dsurf1_Ju_band: Field "Surface radiosity, upside (comp1.rad2.dsurf1.Ju_band)" | scalemethod = init
      comp1_rad_dsurf1_Jd_band: Field "Surface radiosity, downside (comp1.rad.dsurf1.Jd_band)" | scalemethod = init
      comp1_rad_dsurf1_Ju_band: Field "Surface radiosity, upside (comp1.rad.dsurf1.Ju_band)" | scalemethod = init
    t1: Time "Time-Dependent Solver 1"
      tlist = range(0,1,10)
      atolmethod = {comp1_rad2_dsurf1_Jd_band, global, comp1_rad2_dsurf1_Ju_band, global, comp1_rad_dsurf1_Jd_band, global, comp1_rad_dsurf1_Ju_band, global}
      atolvaluemethod = {comp1_rad2_dsurf1_Jd_band, factor, comp1_rad2_dsurf1_Ju_band, factor, comp1_rad_dsurf1_Jd_band, factor, comp1_rad_dsurf1_Ju_band, factor}
      atol = {comp1_rad2_dsurf1_Jd_band, 1e-3, comp1_rad2_dsurf1_Ju_band, 1e-3, comp1_rad_dsurf1_Jd_band, 1e-3, comp1_rad_dsurf1_Ju_band, 1e-3}
      maxorder = 2
      estrat = exclude
      se1: Segregated | ntolfact = 0.1; segstabacc = segaacc; segaaccdim = 5; segaaccmix = 0.9; segaaccdelay = 1
        ss1: SegregatedStep "Radiosity"
          segvar = {comp1_rad_dsurf1_Ju_band, comp1_rad_dsurf1_Jd_band}
          linsolver = d1
          subdamp = 0.8
          subjtech = once
        ss2: SegregatedStep "Radiosity (2)"
          segvar = {comp1_rad2_dsurf1_Ju_band, comp1_rad2_dsurf1_Jd_band}
          linsolver = d2
          subdamp = 0.8
          subjtech = once
      d1: Direct "Direct, radiation variables" | linsolver = pardiso; pivotperturb = 1.0E-13
      d2: Direct "Direct, radiation variables 2" | linsolver = pardiso; pivotperturb = 1.0E-13

Datasets
  dset1: Solution | solution = sol1

Tables
  tbl1: Table "Solution 1/Time-Dependent Solver 1"
    Time step | Reciprocal of step size
    1 | 0.0277778
    2 | 0.0277778
    3 | 0.0138889
    4 | 0.00694444
    5 | 0.00347222
    6 | 0.00173611
    7 | 0.000868056
    8 | 0.000434028
    9 | 0.000277778
    10 | 0.000277778
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  tbl2: Table "Solution 1/Time-Dependent Solver 1, Segregated solver"
    Iteration number | Error: Radiosity | Error: Radiosity (2)
    1 | 1.92861 | 2.17278e-15
    2 | 0.385721 | 1.26704e-15
    3 | 0.0964303 | 1.84363e-15
    4 | 1.0301e-15 | 1.44267e-15
    nan | nan | nan
    4 | 0.898803 | 2.69428e-15
    5 | 0.179761 | 1.14238e-15
    6 | 0.0449402 | 1.64741e-15
    7 | 4.55789e-16 | 1.28527e-15
    nan | nan | nan
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  tbl3: Table "Solution 1/Time-Dependent Solver 1.1"
    Time step | Reciprocal of step size
    1 | 0.0277778
    2 | 0.0277778
    3 | 0.0138889
    4 | 0.00694444
    5 | 0.00347222
    6 | 0.00173611
    7 | 0.000868056
    8 | 0.000434028
    9 | 0.000277778
    10 | 0.000277778
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  tbl4: Table "Solution 1/Time-Dependent Solver 1, Segregated solver 1"
    Iteration number | Error: Radiosity | Error: Radiosity (2)
    1 | 1.92861 | 2.17278e-15
    2 | 0.385721 | 1.26704e-15
    3 | 0.0964303 | 1.84363e-15
    4 | 1.0301e-15 | 1.44267e-15
    nan | nan | nan
    4 | 0.898803 | 2.69428e-15
    5 | 0.179761 | 1.14238e-15
    6 | 0.0449402 | 1.64741e-15
    7 | 4.55789e-16 | 1.28527e-15
    nan | nan | nan
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
Plots
  pg1: PlotGroup3D "Surface Radiosity (rad)" | data = dset1
    slit1: SurfaceSlit | upexpr = rad.Ju; downexpr = rad.Jd
  pg2: PlotGroup3D "Surface Radiosity (rad2)" | data = dset1
    slit1: SurfaceSlit | upexpr = rad2.Ju; downexpr = rad2.Jd